fini
/clear,nostart
/prep7

a=0.2
b=0.1

rect,0,a+a,0,a+a
cm,obl,area
asel,none
rect,b,a+b,b,a+b
cm,centr,area
asel,all
asba,obl,centr,,delete,delete
wprota,0,0,90
wpave,b,0,0
asbw,all
wpave,b+a,0,0
asbw,all
wprota,0,90,0
wpave,0,b,0
asbw,all
wpave,0,b+a,0
asbw,all
lsel,s,loc,x,b/2
lsel,a,loc,x,2*a-b/2
lsel,a,loc,y,b/2
lsel,a,loc,y,2*a-b/2
lsel,u,loc,x,0
lsel,u,loc,x,2*a
lsel,u,loc,y,0
lsel,u,loc,y,2*a
cm,perekrestok,line
lesize,perekrestok,,,50,10
lsel,s,loc,x,a
lsel,a,loc,y,a
cm,kontrkyb,line
lesize,kontrkyb,,,50
et,1,200,6
mshkey,1
esize,0.01
amesh,all
et,2,200,10
type,2
extopt,esize,10,0
vext,all,,,0,0,a
cm,osnova,volu
wprota,0,0,90
wpave,0,0,a
asel,none
rect,b,a+b,b,a+b
cm,centrverx,area
nummrg,all
et,1,200,6
type,1
mshkey,1
esize,0.01
amesh,all
et,2,200,10
type,2
extopt,esize,50,10
vext,all,,,0,0,2*a
vsel,none
blc4,0,0,2*a,2*a,-a
cm,bigverx,volu
vsel,none
blc4,b,b,a,a,-a
cm,smalverx,volu
vsel,a,,,bigverx
vsbv,bigverx,smalverx,,delete,delete
wprota,0,0,-90
wprota,0,90,0
wpave,b,0,0
vsbw,all
wpave,b+a,0,0
vsbw,all
wprota,0,90,0
wpave,0,b,0
vsbw,all
wpave,0,b+a,0
vsbw,all
esize,0.05
allsel
nummrg,all
vmesh,all
cm,domkontyr,volu
vgen,3,domkontyr,,,0.4,,,,0
vgen,3,domkontyr,,,,0.4,,,0
vgen,2,domkontyr,,,0.8,0.4,,,0
vgen,2,domkontyr,,,0.4,0.8,,,0
vgen,2,domkontyr,,,0.8,0.8,,,0
nummrg,all

-------------------
wprota,0,0,-90
wprota,-90,0,0
wpave,0,0,0
asel,none
rect,a+a,4*a,a+a,4*a
cm,obl,area
asel,none
rect,b+a+a,3*a+b,a+a+b,3*a+b
cm,centr,area
asel,a,,,obl
asba,obl,centr,,delete,delete
wprota,0,0,90
wpave,b+a+a,0,0
asbw,all
wpave,b+3*a,0,0
asbw,all
wprota,0,90,0
wpave,0,b+a+a,0
asbw,all
wpave,0,b+3*a,0
asbw,all

lsel,s,loc,x,b/2+2*a
lsel,a,loc,x,4*a-b/2
lsel,a,loc,y,2*a+b/2
lsel,a,loc,y,4*a-b/2
lsel,u,loc,x,2*a
lsel,u,loc,x,4*a
lsel,u,loc,y,2*a
lsel,u,loc,y,4*a
cm,perekrestok,line
lesize,perekrestok,,,50,10

lsel,s,loc,x,a*3
lsel,a,loc,y,a*3
lsel,u,loc,x,0
lsel,u,loc,x,b
lsel,u,loc,x,a
lsel,u,loc,x,a+b
lsel,u,loc,x,a+a+b
lsel,u,loc,x,a+a+a
lsel,u,loc,x,a+a+a+b
lsel,u,loc,x,a+a+a+a
lsel,u,loc,y,0
lsel,u,loc,y,b
lsel,u,loc,y,a
lsel,u,loc,y,a+b
lsel,u,loc,y,a+a+b
lsel,u,loc,y,a+a+a
lsel,u,loc,y,a+a+a+b
lsel,u,loc,y,a+a+a+a
cm,kontrkyb,line
lesize,kontrkyb,,,50

et,1,200,6
mshkey,1
esize,0.01
amesh,all
et,2,200,10
type,2
extopt,esize,10,0
vext,all,,,0,0,a
cm,osnova,volu
wprota,0,0,90
wpave,2*a,2*a,2*a
asel,none
rect,b,a+b,b,a+b
cm,centrverx,area
nummrg,all
et,1,200,6
type,1
mshkey,1
esize,0.01
amesh,all
et,2,200,10
type,2
extopt,esize,50,10
vext,all,,,0,0,a
vsel,none
blc4,0,0,2*a,2*a,-a
cm,bigverx,volu
vsel,none
blc4,b,b,a,a,-a
cm,smalverx,volu
vsel,a,,,bigverx
vsbv,bigverx,smalverx,,delete,delete
wprota,0,0,-90
wprota,0,90,0
wpave,2*a+b,2*a,0
vsbw,all
wpave,2*a+b+a,2*a,0
vsbw,all
wprota,0,90,0
wpave,2*a,2*a+b,0
vsbw,all
wpave,2*a,2*a+b+a,0
vsbw,all
esize,0.05
allsel
nummrg,all
vmesh,all
